# Test 1 - Transamerica Pyramid (505 Sansome Street)
# Constructed in 1980
# Structural System  : Steel Ordinary Moment Frame
# CODE  : UBC 1979
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h := 261
T := 0.05*h/sqrt(150) = 1.06553
C := 1/(15*sqrt(T))
S := 1.5
CS := C*S = 0.0968763
CS := min(0.14, CS) = 0.0968763
Z := 1
I := 1
K := 0.67
C_s.1979 := Z*I*K*CS = 0.0649071
# CODE  : ASCE 7-16
h := 261
S_DS := 1.2
R := 3.5
I := 1
T := 0.028*h^0.8 = 2.40143
C_s := S_DS/(R/I) = 0.342857
C_s.max := 1/(T*(R/I)) = 0.118977
C_s.2016 := min(C_s, C_s.max)/1.4 = 0.0849833
(C_s.2016 - C_s.1979)/C_s.1979 = 0.309306
# Test 2 - 121 Spear Street
# Constructed in 1990
# Structural System  : Ordinary Reinforced Concrete Shear Walls
# CODE  : UBC 1988
h := 280
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C_t := 0.020
T := C_t*h^0.75 = 1.36898
Z := 0.4
I := 1
S := 1.5
C := min(1.25*S/T^(2/3), 2.75) = 1.52079
R := 8
C_s.1988 := Z*I*C/R = 0.0760394
# CODE  : ASCE 7-16
h := 280
S_DS := 1.2
R := 5
I := 1
T := 0.02*h^0.75 = 1.36898
C_s := S_DS/(R/I) = 0.24
C_s.max := 1/(T*(R/I)) = 0.146094
C_s.2016 := min(C_s, C_s.max)/1.4 = 0.104353
(C_s.2016 - C_s.1988)/C_s.1988 = 0.372349
